A := [5, 2, 4, 9; 1, 4, 7, 3; 9, 8, 1, 6]
A[0, 0] = 5
transpose(transpose(A)[:, 2]) = [9, 8, 1, 6]
A[1, 2] = 7
submatrix([5, 2, 4, 9; 1, 4, 7, 3; 9, 8, 1, 6], 0, 0, 0, 1) = [5, 2]
A[2, 3] = 6
A[:, 0] = [5; 1; 9]
submatrix([5, 2, 4, 9; 1, 4, 7, 3; 9, 8, 1, 6], 0, 2, 0, 1) = [5, 2; 1, 4; 9, 8]
A[:, 3] = [9; 3; 6]
submatrix([5, 2, 4, 9; 1, 4, 7, 3; 9, 8, 1, 6], 1, 2, 0, 3) = [1, 4, 7, 3; 9, 8, 1, 6]
transpose(A[:, 3]) = [9, 3, 6]
[5, 2, 4, 9][:, 0] = [5]
submatrix(A, 0, 0, 0, 0) = [5]
transpose(A)[:, 0] = [5; 2; 4; 9]
[5, 2, 4, 9][:, 2] = [4]
submatrix([1; 4; 7; 3], 1, 2, 0, 0) = [4; 7]
submatrix([1; 4; 7; 3], 3, 2, 0, 0) = [3; 7]
ORIGIN := 1
submatrix([1, 2, 3, 4, 5; 6, 7, 8, 9, 10; 11, 12, 13, 14, 15; 16, 17, 18, 19, 20; 21, 22, 23, 24, 25], 1, 5, 1, 5) = [1, 2, 3, 4, 5; 6, 7, 8, 9, 10; 11, 12, 13, 14, 15; 16, 17, 18, 19, 20; 21, 22, 23, 24, 25]
