A := [2, 5, 7; 8, 1, 6]
B := [4, 9, 2; 3, 5, 0]
v := [7; 3; 1]
augment([2, 2; 2, 2], A, B) = [2, 2, 2, 5, 7, 4, 9, 2; 2, 2, 8, 1, 6, 3, 5, 0]
stack(B, A) = [4, 9, 2; 3, 5, 0; 2, 5, 7; 8, 1, 6]
rows(A) = 2
length(v) = 3
csort(A, 1) = [8, 1, 6; 2, 5, 7]
cols(A) = 3
last(v) = 2
csort(A, 0) = [2, 5, 7; 8, 1, 6]
sort(v) = [1; 3; 7]
reverse(v) = [1; 3; 7]
