n := 1, 3 .. 9
p(n) := n^3 - 27
q(n) := sin(2*n + 1)
s(n) := n^2 + 1
p(n) = [-26; 0; 98; 316; 702]
q(n) = [0.14112; 0.656987; -0.99999; 0.650288; 0.149877]
k(n) := cos(s(n))
s(n) = [2; 10; 26; 50; 82]
k(n) = [-0.416147; -0.839072; 0.646919; 0.964966; 0.949678]
i := 0 .. 3
j := 0 .. 5
C[i, j] := i + j
C = [0, 1, 2, 3, 4, 5; 1, 2, 3, 4, 5, 6; 2, 3, 4, 5, 6, 7; 3, 4, 5, 6, 7, 8]
sin(2*x)
2*cos(x)*sin(x)
2*sin(x)*cos(x)
sin(2*x) + (12*cos(x)^3 - 9*cos(x))
12*cos(x)^3 - 9*cos(x) + 2*cos(x)*sin(x)
sin(2*x) + (12*cos(x)^3 - 9*cos(x)) expand → 12*cos(x)^3 - 9*cos(x) + 2*cos(x)*sin(x)
cos(4*x) expand → cos(x)^4 - 6*cos(x)^2*sin(x)^2 + sin(x)^4
cos(4*x) expand, x → cos(x)^4 - 6*cos(x)^2*sin(x)^2 + sin(x)^4
a*cos(sin(x)) → a*cos(sin(x))
a*cos(sin(x)) expand, x → a*cos(sin(x))
(x + 2*y)*z - z^2*(x + 5*y) + z
z*(x + 2*y - x*z - 5*y*z + 1)
